# Служит для очистки рабочей области от ранее созданных гидросопротивлений при нажатии Ctr+F9
hr_clear(0) = 0
# Создание гидравлических сопротивлений и вычисление КГС
# Создаем объект класса "CylindricalFriction" с имененем "tube"
tube := hr_createHydraulicResistance("CylindricalFriction", 10^6, [2*10^-5; 50*10^-3; 1], "tube", 1) = 0
# вычисляем объект
hr_evaluate(tube) = 0
# получаем полный КГС гидравлического сопротивления
hr_getLocalResistanceCoeff(tube) = 0.323582
# Создание композитных гидравлических сопротивлений
# Создаем объекты класса "CylindricalBend" с имененами "bend1" и "bend2"
bend1 := hr_createHydraulicResistance("CylindricalBend", 10^6, [2*10^-5; 65*10^-3; 210*10^-3; 90; 0], "bend1", 1) = 1
bend2 := hr_createHydraulicResistance("CylindricalBend", 10^6, [2*10^-5; 65*10^-3; 210*10^-3; 45; 0], "bend2", 1) = 2
# Создаем композитное гидравлическое сопротивление с именем "composite1", которое включает в себя tube и bend1
composite1 := hr_createComposite(10^6, [65*10^-3; 1], [tube; bend1], "composite1", 1, 1) = 3
# вычисляем композитный объект
hr_evaluate(composite1) = 0
# получаем полный КГС композитного гидравлического сопротивления
hr_getLocalResistanceCoeff(composite1) = 0.994263
# Создание вложенных композитов
# Создаем композитное гидравлическое сопротивление с именем "composite2", которое включает в себя composite1 и bend2
composite2 := hr_createComposite(10^6, [65*10^-3; 1], [composite1; bend2], "composite2", 1, 1) = 4
# вычисляем композитный объект
hr_evaluate(composite2) = 0
# получаем полный КГС композитного гидравлического сопротивления с вложенным композитом
hr_getLocalResistanceCoeff(composite2) = 1.03323
