hr_clear(0) = 0
# Удаление элемента из композита
tube := hr_createHydraulicResistance("CylindricalFriction", 10^6, [2*10^-5; 50*10^-3; 1], "tube", 1) = 0
hr_evaluate(tube) = 0
hr_getLocalResistanceCoeff(tube) = 0.323582
bend1 := hr_createHydraulicResistance("CylindricalBend", 10^6, [2*10^-5; 65*10^-3; 210*10^-3; 90; 0], "bend1", 1) = 1
hr_evaluate(bend1) = 0
hr_getLocalResistanceCoeff(bend1) = 0.0779269
# Создаем композит
composite1 := hr_createComposite(10^6, [65*10^-3; 1], [tube; bend1], "composite1", 1, 1) = 2
hr_evaluate(composite1) = 0
# КГС композитного сопротивления с учетом элемента tube
hr_getLocalResistanceCoeff(composite1) = 0.994263
# Удаляем элемент tube из гидравлического композита (0 - порядковый номер элемента tube в композите)
hr_composite_erase(composite1, 0) = 0
# КГС композитного сопротивления стал равным гидравлическому сопротивлению элемента bend, поскольку композит теперь содержит только элемент bend
hr_evaluate(composite1) = 0
hr_getLocalResistanceCoeff(composite1) = 0.0779269
