hr_clear(0) = 0
# Получение id элементов композита
tube := hr_createHydraulicResistance("CylindricalFriction", 10^6, [2*10^-5; 50*10^-3; 1], "tube", 1) = 0
bend1 := hr_createHydraulicResistance("CylindricalBend", 10^6, [2*10^-5; 65*10^-3; 210*10^-3; 90; 0], "bend1", 1) = 1
# Создаем композит
composite1 := hr_createComposite(10^6, [65*10^-3; 1], [tube; bend1], "composite1", 1, 0) = 2
# Id первого элемента в композите
hr_composite_get(composite1, 0) = 0
# Id первого всех элементов композита в композите
hr_composite_getAll(composite1) = [0; 1]
