# Служит для очистки рабочей области от ранее созданных гидросопротивлений при нажатии Ctr+F9
hr_clear(0) = 0
# Создание гидравлических сопротивлений и вычисление КГС
# Создаем объект класса "CylindricalFriction" с имененем "tube"
tube := hr_createHydraulicResistance("CylindricalFriction", 10^6, [2*10^-5; 50*10^-3; 1], "tube", 1) = 0
# вычисляем объект
hr_evaluate(tube) = 0
# получаем полный КГС гидравлического сопротивления
hr_getLocalResistanceCoeff(tube) = 0.323582
