hr_clear(0) = 0
# Указывающий композитный элемент
tube := hr_createHydraulicResistance("CylindricalFriction", 10^6, [2*10^-5; 50*10^-3; 1], "tube", 1) = 0
bend1 := hr_createHydraulicResistance("CylindricalBend", 10^6, [2*10^-5; 65*10^-3; 210*10^-3; 90; 0], "bend1", 1) = 1
# Создаем указывающий композит
composite1 := hr_createComposite(10^6, [65*10^-3; 1], [tube; bend1], "composite1", 1, 0) = 2
hr_evaluate(composite1) = 0
# Исходный КГС композитного сопротивления
hr_getLocalResistanceCoeff(composite1) = 0.994263
# Изменяем геометрию элемента tube, который мы ранее включили в композитный элемент
hr_setGeometry(tube, [2*10^-5; 10*10^-3; 1]) = 0
# КГС композитного сопротивления изменился, т.к. в composite1 хранится указатель на tube
hr_evaluate(composite1) = 0
hr_getLocalResistanceCoeff(composite1) = 4179.41
